Sat Sep 25 07:40:51 CDT 2021
$PROB template control stream
;-----------------------------------------------------------------------
; Project: 	Investigating the contribution of residual unexplained
; 	   	variability in nonlinear mixed-effect approach
; Model: 	One-compartment model with linear elimination
; Estim:	First-order conditional est. with interaction
; Author: 	Mutaz M. Jaber <jaber038@umn.edu>
; Date created: 9/7/2021
; Date modified: 9/7/2021
;-----------------------------------------------------------------------
$INPUT ID TIME DV AMT MDV EVID
$DATA ../../../../data/spa/B/dat1.csv ignore=@
$SUBR ADVAN2 TRANS2
$EST MET=1 NOABORT MAX=10000 PRINT=5 INTER
$PK

ET1 = EXP(ETA(1)*THETA(4))
ET2 = EXP(ETA(2)*THETA(5))
ET3 = EXP(ETA(3)*THETA(6))

CL = 5.0 * THETA(1) * ET1
V = 85  * THETA(2) * ET2
KA = 0.7 * THETA(3) * ET3

SC = V
$ERROR
CVERR 	= 0.05
W  	= THETA(7)*F*CVERR
Y  	= F + W * ERR(1)
$THETA
(0,1) ; tvCL
(0,1) ; tvV
(0,1) ; tvKA
(0,1) ; tvCL
(0,1) ; tvV
(0,1) ; tvK
(0,1) ; RUV
$OMEGA
0.9 FIX ;     IIV CL
0.9 FIX  ;     IIV V
0.9 FIX ;      IIV KA
$SIGMA  1  FIX;        [P]
$COVARIANCE UNCOND

NM-TRAN MESSAGES
 WARNINGS AND ERRORS (IF ANY) FOR PROBLEM    1
 (WARNING  2) NM-TRAN INFERS THAT THE DATA ARE POPULATION.

1NONLINEAR MIXED EFFECTS MODEL PROGRAM (NONMEM) VERSION 7.5.0
 ORIGINALLY DEVELOPED BY STUART BEAL, LEWIS SHEINER, AND ALISON BOECKMANN
 CURRENT DEVELOPERS ARE ROBERT BAUER, ICON DEVELOPMENT SOLUTIONS,
 AND ALISON BOECKMANN. IMPLEMENTATION, EFFICIENCY, AND STANDARDIZATION
 PERFORMED BY NOUS INFOSYSTEMS.
 PROBLEM NO.:         1
 template control stream
 TOT. NO. OF OBS RECS:      400
 TOT. NO. OF INDIVIDUALS:      100
 ONE COMPARTMENT MODEL WITH FIRST-ORDER ABSORPTION (ADVAN2)
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 #TBLN:      1
 #METH: First Order Conditional Estimation with Interaction
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
 #TERM:
0MINIMIZATION SUCCESSFUL
 NO. OF FUNCTION EVALUATIONS USED:      274
 NO. OF SIG. DIGITS IN FINAL EST.:  3.3

 ETABAR IS THE ARITHMETIC MEAN OF THE ETA-ESTIMATES,
 AND THE P-VALUE IS GIVEN FOR THE NULL HYPOTHESIS THAT THE TRUE MEAN IS 0.

 ETABAR:        -3.7530E-03 -4.1053E-02 -1.5514E-01
 SE:             9.3945E-02  9.0544E-02  7.0544E-02
 N:                     100         100         100

 P VAL.:         9.6813E-01  6.5026E-01  2.7859E-02

 ETASHRINKSD(%)  4.7429E-01  4.0771E+00  2.5266E+01
 ETASHRINKVR(%)  9.4632E-01  7.9879E+00  4.4148E+01
 EBVSHRINKSD(%)  6.6455E-01  4.1623E+00  2.2566E+01
 EBVSHRINKVR(%)  1.3247E+00  8.1513E+00  4.0041E+01
 RELATIVEINF(%)  9.8621E+01  9.1019E+01  5.9442E+01
 EPSSHRINKSD(%)  3.7762E+01
 EPSSHRINKVR(%)  6.1264E+01


 TOTAL DATA POINTS NORMALLY DISTRIBUTED (N):          400
 N*LOG(2PI) CONSTANT TO OBJECTIVE FUNCTION:    735.15082656373818
 OBJECTIVE FUNCTION VALUE WITHOUT CONSTANT:   -1650.4682023275127
 OBJECTIVE FUNCTION VALUE WITH CONSTANT:      -915.31737576377452
 REPORTED OBJECTIVE FUNCTION DOES NOT CONTAIN CONSTANT

 TOTAL EFFECTIVE ETAS (NIND*NETA):                           300


 #TERE:
 Elapsed estimation  time in seconds:     1.79
 Elapsed covariance  time in seconds:     1.47
 Elapsed postprocess time in seconds:     0.00

 ********************               FIRST ORDER CONDITIONAL ESTIMATION WITH INTERACTION              ********************
 #OBJT:**************                       MINIMUM VALUE OF OBJECTIVE FUNCTION                      ********************
 #OBJV:********************************************    -1650.468       **************************************************

 ********************               FIRST ORDER CONDITIONAL ESTIMATION WITH INTERACTION              ********************
 ********************                             FINAL PARAMETER ESTIMATE                           ********************

 THETA - VECTOR OF FIXED EFFECTS PARAMETERS   *********
         TH 1      TH 2      TH 3      TH 4      TH 5      TH 6      TH 7
         1.01E+00  1.07E+00  1.88E+00  3.14E-01  2.04E-01  5.58E-01  1.28E+00

 OMEGA - COV MATRIX FOR RANDOM EFFECTS - ETAS  ********
         ETA1      ETA2      ETA3
 ETA1
+        9.00E-01
 ETA2
+        0.00E+00  9.00E-01
 ETA3
+        0.00E+00  0.00E+00  9.00E-01

 SIGMA - COV MATRIX FOR RANDOM EFFECTS - EPSILONS  ****
         EPS1
 EPS1
+        1.00E+00

 OMEGA - CORR MATRIX FOR RANDOM EFFECTS - ETAS  *******
         ETA1      ETA2      ETA3
 ETA1
+        9.49E-01
 ETA2
+        0.00E+00  9.49E-01
 ETA3
+        0.00E+00  0.00E+00  9.49E-01

 SIGMA - CORR MATRIX FOR RANDOM EFFECTS - EPSILONS  ***
         EPS1
 EPS1
+        1.00E+00

 ********************               FIRST ORDER CONDITIONAL ESTIMATION WITH INTERACTION              ********************
 ********************                            STANDARD ERROR OF ESTIMATE                          ********************

 THETA - VECTOR OF FIXED EFFECTS PARAMETERS   *********
         TH 1      TH 2      TH 3      TH 4      TH 5      TH 6      TH 7
         3.02E-02  2.24E-02  1.44E-01  1.98E-02  1.58E-02  6.10E-02  1.23E-01

 OMEGA - COV MATRIX FOR RANDOM EFFECTS - ETAS  ********
         ETA1      ETA2      ETA3
 ETA1
+       .........
 ETA2
+       ......... .........
 ETA3
+       ......... ......... .........

 SIGMA - COV MATRIX FOR RANDOM EFFECTS - EPSILONS  ****
         EPS1
 EPS1
+       .........

 OMEGA - CORR MATRIX FOR RANDOM EFFECTS - ETAS  *******
         ETA1      ETA2      ETA3
 ETA1
+       .........
 ETA2
+       ......... .........
 ETA3
+       ......... ......... .........

 SIGMA - CORR MATRIX FOR RANDOM EFFECTS - EPSILONS  ***
         EPS1
 EPS1
+       .........

 ********************               FIRST ORDER CONDITIONAL ESTIMATION WITH INTERACTION              ********************
 ********************                          COVARIANCE MATRIX OF ESTIMATE                         ********************

            TH 1      TH 2      TH 3      TH 4      TH 5      TH 6      TH 7      OM11      OM12      OM13      OM22      OM23
             OM33      SG11
 TH 1
+        9.14E-04
 TH 2
+        4.24E-05  5.00E-04
 TH 3
+        4.11E-04  8.03E-04  2.06E-02
 TH 4
+        3.20E-05  2.57E-05 -3.25E-04  3.91E-04
 TH 5
+       -4.21E-05 -1.01E-04  2.17E-04 -5.15E-05  2.51E-04
 TH 6
+        1.50E-04  1.64E-04  4.48E-03 -2.99E-05  7.12E-05  3.72E-03
 TH 7
+       -3.01E-04  6.64E-04  1.98E-03 -3.01E-05 -3.60E-04 -1.11E-03  1.52E-02
 OM11
+       ......... ......... ......... ......... ......... ......... ......... .........
 OM12
+       ......... ......... ......... ......... ......... ......... ......... ......... .........
 OM13
+       ......... ......... ......... ......... ......... ......... ......... ......... ......... .........
 OM22
+       ......... ......... ......... ......... ......... ......... ......... ......... ......... ......... .........
 OM23
+       ......... ......... ......... ......... ......... ......... ......... ......... ......... ......... ......... .........
 OM33
+       ......... ......... ......... ......... ......... ......... ......... ......... ......... ......... ......... .........
         .........
 SG11
+       ......... ......... ......... ......... ......... ......... ......... ......... ......... ......... ......... .........
         ......... .........

 ********************               FIRST ORDER CONDITIONAL ESTIMATION WITH INTERACTION              ********************
 ********************                          CORRELATION MATRIX OF ESTIMATE                        ********************

            TH 1      TH 2      TH 3      TH 4      TH 5      TH 6      TH 7      OM11      OM12      OM13      OM22      OM23
             OM33      SG11
 TH 1
+        3.02E-02
 TH 2
+        6.27E-02  2.24E-02
 TH 3
+        9.47E-02  2.50E-01  1.44E-01
 TH 4
+        5.35E-02  5.81E-02 -1.15E-01  1.98E-02
 TH 5
+       -8.79E-02 -2.85E-01  9.52E-02 -1.64E-01  1.58E-02
 TH 6
+        8.16E-02  1.20E-01  5.12E-01 -2.48E-02  7.37E-02  6.10E-02
 TH 7
+       -8.06E-02  2.40E-01  1.12E-01 -1.23E-02 -1.84E-01 -1.47E-01  1.23E-01
 OM11
+       ......... ......... ......... ......... ......... ......... ......... .........
 OM12
+       ......... ......... ......... ......... ......... ......... ......... ......... .........
 OM13
+       ......... ......... ......... ......... ......... ......... ......... ......... ......... .........
 OM22
+       ......... ......... ......... ......... ......... ......... ......... ......... ......... ......... .........
 OM23
+       ......... ......... ......... ......... ......... ......... ......... ......... ......... ......... ......... .........
 OM33
+       ......... ......... ......... ......... ......... ......... ......... ......... ......... ......... ......... .........
         .........
 SG11
+       ......... ......... ......... ......... ......... ......... ......... ......... ......... ......... ......... .........
         ......... .........
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 Elapsed finaloutput time in seconds:     0.06
 #CPUT: Total CPU Time in Seconds,        3.316
