Sat Sep 25 12:38:01 CDT 2021
$PROB template control stream
;-----------------------------------------------------------------------
; Project: 	Investigating the contribution of residual unexplained
; 	   	variability in nonlinear mixed-effect approach
; Model: 	Two-compartment model with linear elimination
; Estim:	First-order conditional est. with interaction
; Author: 	Mutaz M. Jaber <jaber038@umn.edu>
; Date created: 9/7/2021
; Date modified: 9/7/2021
;-----------------------------------------------------------------------
$INPUT ID TIME DV AMT MDV EVID
$DATA ../../../../data/spa/TD1/dat1.csv ignore=@
$SUBR ADVAN4 TRANS4
$EST MET=1 NOABORT MAX=10000 PRINT=5 INTER
$PK
ET1 = EXP(ETA(1)*THETA(6))
ET2 = EXP(ETA(2)*THETA(7))
ET3 = EXP(ETA(3)*THETA(8))
ET4 = EXP(ETA(4)*THETA(9))
ET5 = EXP(ETA(5)*THETA(10))

CL = 5.0 * THETA(1) * ET1
V2 = 35  * THETA(2) * ET2
Q  = 50  * THETA(3) * ET3
V3 = 50  * THETA(4) * ET4
KA = 0.7 * THETA(5) * ET5
SC = V2
$ERROR
CVERR = 0.05
W = THETA(11)*F*CVERR

Y 	= F + W*ERR(1)

$THETA
(0,1) ; CL
(0,1) ; V2
(0,1) ; Q
(0,1) ; V3
(0,1) ; KA
(0,1) ; IIVCL
(0,1) ; IIVV2
(0,1) ; IIVQ
(0,1) ; IIVV3
(0,1) ; IIVKA
(0,1) ; CVPropErr

$OMEGA  0.09 FIX 0.09 FIX 0.09 FIX 0.09 FIX 0.09 FIX
$SIGMA  1 FIX ;        [P]
$COVARIANCE UNCOND

NM-TRAN MESSAGES
 WARNINGS AND ERRORS (IF ANY) FOR PROBLEM    1
 (WARNING  2) NM-TRAN INFERS THAT THE DATA ARE POPULATION.

1NONLINEAR MIXED EFFECTS MODEL PROGRAM (NONMEM) VERSION 7.5.0
 ORIGINALLY DEVELOPED BY STUART BEAL, LEWIS SHEINER, AND ALISON BOECKMANN
 CURRENT DEVELOPERS ARE ROBERT BAUER, ICON DEVELOPMENT SOLUTIONS,
 AND ALISON BOECKMANN. IMPLEMENTATION, EFFICIENCY, AND STANDARDIZATION
 PERFORMED BY NOUS INFOSYSTEMS.
 PROBLEM NO.:         1
 template control stream
 TOT. NO. OF OBS RECS:      400
 TOT. NO. OF INDIVIDUALS:      100
 TWO COMPARTMENT MODEL WITH FIRST-ORDER ABSORPTION (ADVAN4)
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 #TBLN:      1
 #METH: First Order Conditional Estimation with Interaction
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
 #TERM:
0MINIMIZATION SUCCESSFUL
 HOWEVER, PROBLEMS OCCURRED WITH THE MINIMIZATION.
 REGARD THE RESULTS OF THE ESTIMATION STEP CAREFULLY, AND ACCEPT THEM ONLY
 AFTER CHECKING THAT THE COVARIANCE STEP PRODUCES REASONABLE OUTPUT.
 NO. OF FUNCTION EVALUATIONS USED:      878
 NO. OF SIG. DIGITS IN FINAL EST.:  3.8

 ETABAR IS THE ARITHMETIC MEAN OF THE ETA-ESTIMATES,
 AND THE P-VALUE IS GIVEN FOR THE NULL HYPOTHESIS THAT THE TRUE MEAN IS 0.

 ETABAR:         4.0489E-04 -9.8178E-03 -4.2427E-02 -1.9285E-03 -4.9653E-02
 SE:             2.9865E-02  1.4976E-02  1.5687E-02  2.5639E-02  2.1451E-02
 N:                     100         100         100         100         100

 P VAL.:         9.8918E-01  5.1210E-01  6.8398E-03  9.4004E-01  2.0627E-02

 ETASHRINKSD(%)  1.0000E-10  4.9829E+01  4.7446E+01  1.4106E+01  2.8137E+01
 ETASHRINKVR(%)  1.0000E-10  7.4829E+01  7.2381E+01  2.6222E+01  4.8357E+01
 EBVSHRINKSD(%)  4.1700E-01  4.9778E+01  5.2422E+01  1.4862E+01  2.3032E+01
 EBVSHRINKVR(%)  8.3227E-01  7.4778E+01  7.7364E+01  2.7516E+01  4.0759E+01
 RELATIVEINF(%)  9.6046E+01  3.7947E-01  4.8147E+00  1.1649E+00  1.2106E+01
 EPSSHRINKSD(%)  4.4967E+01
 EPSSHRINKVR(%)  6.9714E+01


 TOTAL DATA POINTS NORMALLY DISTRIBUTED (N):          400
 N*LOG(2PI) CONSTANT TO OBJECTIVE FUNCTION:    735.15082656373818
 OBJECTIVE FUNCTION VALUE WITHOUT CONSTANT:   -1685.9894825499241
 OBJECTIVE FUNCTION VALUE WITH CONSTANT:      -950.83865598618593
 REPORTED OBJECTIVE FUNCTION DOES NOT CONTAIN CONSTANT

 TOTAL EFFECTIVE ETAS (NIND*NETA):                           500


 #TERE:
 Elapsed estimation  time in seconds:    11.29
 Elapsed covariance  time in seconds:     6.43
 Elapsed postprocess time in seconds:     0.00

 ********************               FIRST ORDER CONDITIONAL ESTIMATION WITH INTERACTION              ********************
 #OBJT:**************                       MINIMUM VALUE OF OBJECTIVE FUNCTION                      ********************
 #OBJV:********************************************    -1685.989       **************************************************

 ********************               FIRST ORDER CONDITIONAL ESTIMATION WITH INTERACTION              ********************
 ********************                             FINAL PARAMETER ESTIMATE                           ********************

 THETA - VECTOR OF FIXED EFFECTS PARAMETERS   *********
         TH 1      TH 2      TH 3      TH 4      TH 5      TH 6      TH 7      TH 8      TH 9      TH10      TH11
         1.00E+00  7.36E-01  1.60E+00  1.23E+00  1.22E+00  9.90E-01  1.26E+00  1.41E+00  8.31E-01  1.37E+00  9.71E-01

 OMEGA - COV MATRIX FOR RANDOM EFFECTS - ETAS  ********
         ETA1      ETA2      ETA3      ETA4      ETA5
 ETA1
+        9.00E-02
 ETA2
+        0.00E+00  9.00E-02
 ETA3
+        0.00E+00  0.00E+00  9.00E-02
 ETA4
+        0.00E+00  0.00E+00  0.00E+00  9.00E-02
 ETA5
+        0.00E+00  0.00E+00  0.00E+00  0.00E+00  9.00E-02

 SIGMA - COV MATRIX FOR RANDOM EFFECTS - EPSILONS  ****
         EPS1
 EPS1
+        1.00E+00

 OMEGA - CORR MATRIX FOR RANDOM EFFECTS - ETAS  *******
         ETA1      ETA2      ETA3      ETA4      ETA5
 ETA1
+        3.00E-01
 ETA2
+        0.00E+00  3.00E-01
 ETA3
+        0.00E+00  0.00E+00  3.00E-01
 ETA4
+        0.00E+00  0.00E+00  0.00E+00  3.00E-01
 ETA5
+        0.00E+00  0.00E+00  0.00E+00  0.00E+00  3.00E-01

 SIGMA - CORR MATRIX FOR RANDOM EFFECTS - EPSILONS  ***
         EPS1
 EPS1
+        1.00E+00

 ********************               FIRST ORDER CONDITIONAL ESTIMATION WITH INTERACTION              ********************
 ********************                            STANDARD ERROR OF ESTIMATE                          ********************

 THETA - VECTOR OF FIXED EFFECTS PARAMETERS   *********
         TH 1      TH 2      TH 3      TH 4      TH 5      TH 6      TH 7      TH 8      TH 9      TH10      TH11
         3.07E-02  3.18E-01  6.11E-01  2.13E-01  2.16E-01  6.29E-02  2.30E-01  5.26E-01  9.21E-02  2.35E-01  8.16E-02

 OMEGA - COV MATRIX FOR RANDOM EFFECTS - ETAS  ********
         ETA1      ETA2      ETA3      ETA4      ETA5
 ETA1
+       .........
 ETA2
+       ......... .........
 ETA3
+       ......... ......... .........
 ETA4
+       ......... ......... ......... .........
 ETA5
+       ......... ......... ......... ......... .........

 SIGMA - COV MATRIX FOR RANDOM EFFECTS - EPSILONS  ****
         EPS1
 EPS1
+       .........

 OMEGA - CORR MATRIX FOR RANDOM EFFECTS - ETAS  *******
         ETA1      ETA2      ETA3      ETA4      ETA5
 ETA1
+       .........
 ETA2
+       ......... .........
 ETA3
+       ......... ......... .........
 ETA4
+       ......... ......... ......... .........
 ETA5
+       ......... ......... ......... ......... .........

 SIGMA - CORR MATRIX FOR RANDOM EFFECTS - EPSILONS  ***
         EPS1
 EPS1
+       .........
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 Elapsed finaloutput time in seconds:     0.03
 #CPUT: Total CPU Time in Seconds,       17.783
